! =====================================================================
!  ANSYS MAPDL HPC smoke test
!  Free thermal expansion of a silicon cube (SOLID185, mapped hex mesh).
!
!  Symmetry BCs on three faces -> the cube expands freely, so:
!     UX_max  = alpha * dT * L   (analytical)
!     S_eqv   ~ 0
!  The run passes if the FE/analytical error is ~0 %.
!
!  Command-line overrides (defaults below are used if not given):
!     -NDIV   n   elements per edge (NDIV^3 elements, ~3*NDIV^3 DOF)
!     -SOLVER 1   sparse direct solver
!     -SOLVER 2   PCG iterative solver (usually faster for bulky 3D solids)
! =====================================================================
/BATCH
/TITLE, HPC smoke test - free thermal expansion of Si cube

! ---------------- parameters (keep command-line values if set) ----------------
*GET,_PT,PARM,NDIV,TYPE
*IF,_PT,EQ,-1,THEN
  NDIV = 60         ! 60 -> 216k elements, ~670k DOF
*ENDIF
*GET,_PT,PARM,SOLVER,TYPE
*IF,_PT,EQ,-1,THEN
  SOLVER = 2
*ENDIF

L     = 10e-6       ! cube edge length [m]
T0    = 20          ! reference temperature [C]
DT    = 100         ! temperature rise [K]
ALPHA = 2.6e-6      ! CTE of Si [1/K]

/NOPR               ! don't echo every command to the output file

! ---------------- preprocessing ----------------
/PREP7
ET,1,SOLID185
MP,EX,1,130e9       ! Young's modulus of Si [Pa]
MP,PRXY,1,0.28      ! Poisson's ratio
MP,ALPX,1,ALPHA

BLOCK,0,L,0,L,0,L
ESIZE,,NDIV
MSHAPE,0,3D
MSHKEY,1
VMESH,ALL
FINISH

! ---------------- solution ----------------
/SOLU
ANTYPE,STATIC

*IF,SOLVER,EQ,2,THEN
  EQSLV,PCG,1e-8    ! iterative: low memory, scales well on bulky 3D meshes
*ELSE
  EQSLV,SPARSE      ! direct: robust, more memory and I/O
*ENDIF

! Only write what post-processing needs -> smaller, faster result file
OUTRES,ERASE
OUTRES,NSOL,LAST
OUTRES,STRS,LAST

! Explicit tolerance: NSEL at 0 defaults to +/-1e-6, which is a tenth of
! this micron-scale cube and would grab ~7 node layers instead of one face.
TOL = L/NDIV/100
NSEL,S,LOC,X,-TOL,TOL
D,ALL,UX,0
NSEL,S,LOC,Y,-TOL,TOL
D,ALL,UY,0
NSEL,S,LOC,Z,-TOL,TOL
D,ALL,UZ,0
ALLSEL

TREF,T0
BFUNIF,TEMP,T0+DT
SOLVE
FINISH

! ---------------- postprocessing ----------------
/GOPR
/POST1
SET,LAST
*GET,NNODE,NODE,0,COUNT
*GET,NELEM,ELEM,0,COUNT

NSORT,U,X
*GET,UXMAX,SORT,,MAX
NSORT,S,EQV
*GET,SEQVMAX,SORT,,MAX

UXEXACT = ALPHA*DT*L
ERR     = ABS(UXMAX-UXEXACT)/UXEXACT*100

*CFOPEN,results,txt
*VWRITE,NDIV,SOLVER
('NDIV: ',F6.0,'   Solver (1=sparse, 2=PCG): ',F3.0)
*VWRITE,NNODE,NELEM
('Nodes: ',F12.0,'   Elements: ',F12.0)
*VWRITE,UXMAX,UXEXACT,ERR
('UX max FE = ',E14.6,' m   UX exact = ',E14.6,' m   error = ',F10.6,' %')
*VWRITE,SEQVMAX
('Max von Mises (should be ~0) = ',E14.6,' Pa')
*CFCLOSE
FINISH

/EXIT,NOSAVE
